<?xml version="1.0"?>
<!--
   Author:   ZHAOXIZIYI
-->

<propeller name="Fixed-Pitch 13-8-inch Two-Blade Propeller">
  <ixx> 0.0047</ixx>   <!--有待修正-->
  <diameter unit="IN"> 13.0 </diameter>
  <numblades> 2 </numblades>
  <minpitch> 1 </minpitch>
  <maxpitch> 1 </maxpitch>
<!--<sense> 1 </sense>-->
<!--  <reversepitch>  </reversepitch>-->
    <table name="C_THRUST" type="internal">
    <tableData>
      0.0   0.073
      0.1   0.073
      0.2   0.072
      0.3   0.071
      0.4   0.069
      0.5   0.066
      0.6   0.062
      0.7   0.055
      0.8   0.045
      0.9   0.034
      1.0   0.024
      1.1   0.013
      1.2   -0.006
      1.3   -0.013
      1.4   -0.024
      1.5   -0.034
      1.6   -0.045
      1.7   -0.055
      1.8   -0.062
      1.9   -0.066
      2.0   -0.069
      2.1   -0.071
      2.2   -0.072
      2.3   -0.073
      5.0   -0.073
    </tableData>
  </table>
  <table name="C_POWER" type = "internal">
    <tableData>
      0.0   0.0660
      0.1   0.0700
      0.2   0.0700
      0.3   0.0660
      0.4   0.0600
      0.5   0.0530
      0.6   0.0501
      0.7   0.0469
      0.8   0.0426
      0.9   0.0360
      1.0   0.0282
      1.1   0.0191
      1.2   0.0155
      1.3   0.0191
      1.4   0.0282
      1.5   0.0360
      1.6   0.0426
      1.7   0.0469
      1.8   0.0501
      1.9   0.0516
      2.0   0.0525
      2.1   0.0525
      2.2   0.0522
      2.3   0.0511
      2.4   0.0504
      5.0   0.0493
    </tableData>
  </table>
</propeller>
