<?xml version="1.0"?>
<!--
   Author:   ZHAOXIZIYI
-->

<propeller name="Fixed-Pitch 13-8-inch Two-Blade Propeller">
  <ixx unit="KG*M2"> 9.35e-05 </ixx>   <!--根据SULA89螺旋桨的三维模型，单个桨质量7克，一对14克-->
  <diameter unit="IN"> 13.0 </diameter>
  <numblades> 2 </numblades>
  <!-- maxpitch 和 minpitch是桨叶的pitch的上下限，定桨距地螺旋桨，pitch是不变化的-->
  <minpitch> 1 </minpitch>
  <maxpitch> 1 </maxpitch>

  <constspeed> 0 </constspeed>

<sense> 1 </sense>
    <table name="C_THRUST" type="internal">
      <!-- 采用SULA89的螺旋桨CFD仿真结果-->
    <tableData>
      0.00    0.08186
      0.30303	0.07161
      0.31348	0.06953
      0.41322	0.05325
      0.45455	0.04903
      0.47022	0.04596
      0.60606	0.02309
      0.61983	0.01955
      0.62696	0.01884
      0.66116	0.0114
    </tableData>
  </table>
  <table name="C_POWER" type = "internal">
    <tableData>
      0	0.03485
      0.30303	0.037
      0.31348	0.03594
      0.41322	0.03189
      0.45455	0.03127
      0.47022	0.02982
      0.60606	0.02017
      0.61983	0.01808
      0.62696	0.01769
      0.66116	0.0139
    </tableData>
  </table>
</propeller>
